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/batch
! ANSYS input file written by Workbench version 2024 R1
! File used for geometry attach: C:\Users\brend\Desktop\Engine-Development\Solidworks Model\Sample Rotor 2.STEP
/title,Rotor FEA--Static Structural (B5)
/COM,/COM,     ANSYSMotion, 2024.1
/com,--- Data in consistent BIN units. See Solving Units in the help system for more information.
/units,BIN
/prep7
! Turn off shape checking because checks already performed inside WB mesher.
! See help system for more information.
SHPP,OFF,,NOWARN
etcon,set             ! allow ANSYS to choose best KEYOP's for 180x elements, resets any applicable keyopt to MAPDL defaults
/com,*********** Nodes for the whole assembly ***********
nblock,3,,19786
(1i9,3e20.9e3)
        1    -1.429664376E-01     4.687500000E-01     2.863590421E-01
        2    -1.429664376E-01     3.125000000E-01     2.863590421E-01
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-1
/com,*********** Elements for Body 1 "Sample Rotor 2-FreeParts|CirPattern1" ***********
et,1,186
keyo,1,2,1          ! set full integration on SOLID186
eblock,19,solid,,3320
(19i9)
        1        1        1        1        0        0        0        0       20        0        1        1      613      568     3476     2468     2264     2279     3475
     4887     7180     7183     4890    12237    12235    12260    12501     4889     7361     7182    14780
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-1
/com,*********** Send User Defined Coordinate System(s) ***********
csys,0
toffst,459.67,  ! Temperature offset from absolute zero
/com,*********** Set Reference Temperature ***********
tref,71.6
/com,*********** Send Materials ***********
MP,DENS,1,0.000711151356163667,	! slinch in^-3
MP,EX,1,19348034.2110633,	! slinch s^-2 in^-1
MP,NUXY,1,0.26,

!************************* Model Summary ********************
!Sample Rotor 2-FreeParts|CirPattern1,	SS 304 (760 C),	matid,	1
!************************* End Model Summary ********************
/com,*********** Fixed Supports ***********
CMBLOCK,_FIXEDSU,NODE,      112
(8i10)
      3338      3339      3340      3437      3438      3439      3440      3441
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
cmsel,s,_FIXEDSU
d,all,all
nsel,all
/com,*********** Define Rotational Velocity ***********
esel,none
esel,a,type,,1
cm,cm_rotvelcity33,elem
esel,all
fini
/com,****************************************************************************
/com,*************************    SOLUTION       ********************************
/com,****************************************************************************
/solu
antype,0                   ! static analysis
_thickRatio=  1     ! Ratio of thick parts in the model
eqsl,pcg,1e-8,,,,,,1
cntr,print,1               ! print out contact info and also make no initial contact an error
cncheck,dmp		!	Enable program controlled contact splitting for distributed memory parallel run
dmpoption,emat,no             ! Don't combine emat file for DANSYS
dmpoption,esav,no             ! Don't combine esav file for DANSYS
nldiag,cont,iter           ! print out contact info each equilibrium iteration
rescontrol,,none                 ! Do not keep any restart files
/com,****************************************************
/com,******************* SOLVE FOR LS 1 OF 1 ****************
cmom,cm_rotvelcity33,0.,-3142.,0.,0.000000,0.312500,0.000000
nsub,1,1,1
time,1.
outres,erase
outres,all,none
outres,nsol,all,
outres,rsol,all
outres,eangl,all
outres,etmp,all
outres,veng,all
outres,strs,all,
outres,epel,all,
outres,eppl,all,
outres,cont,all,
! *********** WB SOLVE COMMAND ***********
! check interactive state
*get,ANSINTER_,active,,int
*if,ANSINTER_,ne,0,then
/eof
*endif
solve
/com *************** Write FE CONNECTORS *********
CEWRITE,file,ce,,INTE
/com,****************************************************
/com,*************** FINISHED SOLVE FOR LS 1 *************
*get,_NSOLTHREADS,active,0,ntfs
*get,_NSOLPROCESSES,active,0,npfs
*get,_PCGITER,active,,solu,cgiter
/post1
fini
